// SBML level 3 version 2

model detox_gland_angiogenesis()
  // In-Situ Angiogenesis Model — Gland Vascularization
  // Mathematical model of in-situ angiogenesis for the synthetic detox gland (v2.0).
  // Models: growth factor diffusion → endothelial tip cell migration → sprout elongation → anastomosis → perfusion
  // Governing PDE: ∂c/∂t = D∇²c - λc + S(x,t) for each growth factor, coupled to cellular response via stochastic tip cell migration.

  // Compartments:
  compartment gel_scaffold = 3e-6 litre;
  compartment host_tissue = 1e-4 litre;
  compartment blood = 5 litre;

  // Species:
  species VEGF in gel_scaffold = 0.001;
  species bFGF in gel_scaffold = 0.0005;
  species Ang1 in gel_scaffold = 0.002;
  species SDF1a in gel_scaffold = 0.001;
  species VEGF_host in host_tissue = 0;
  species tip_cells_activated in host_tissue = 0;
  species sprout_length in host_tissue = 0;
  species EPC_homed in gel_scaffold = 0;
  species perfused_volume_fraction in gel_scaffold = 0;
  species vessel_density in gel_scaffold = 0;
  species antidote_blood in blood = 0;
  species hypoxia_signal in gel_scaffold = 1;

  // Parameters:
  D_VEGF = 1.5e-7 cm2_per_second;
  D_bFGF = 1e-7 cm2_per_second;
  D_SDF1 = 2e-7 cm2_per_second;
  lambda_VEGF = 2e-5 per_second;
  lambda_bFGF = 1e-5 per_second;
  k_tip_activation = 5e-4 per_second;
  k_sprout_elongation = 1e-4 cm_per_second;
  k_EPC_homing = 2e-5 per_second;
  k_anastomosis = 1e-6 per_second;
  K_VEGF_half = 0.0005 mmol;
  k_antidote_secretion = 1e-8 per_second;
  k_hypoxia_decay = 5e-6 per_second;
  vessel_perfusion_rate = 0.1 per_second;

  // Reactions:
  VEGF_release_from_gel: => VEGF; 0.001*exp(-0.0005*time);
  VEGF_diffusion_to_host: VEGF => VEGF_host; D_VEGF*VEGF;
  tip_cell_activation: VEGF_host => tip_cells_activated; k_tip_activation*(VEGF_host/(K_VEGF_half + VEGF_host));
  sprout_elongation: tip_cells_activated + VEGF => sprout_length; k_sprout_elongation*VEGF*tip_cells_activated;
  EPC_homing_SDF1: SDF1a => EPC_homed; k_EPC_homing*SDF1a;
  vessel_formation_anastomosis: sprout_length + EPC_homed => vessel_density; k_anastomosis*sprout_length*EPC_homed;
  perfusion_development: vessel_density => perfused_volume_fraction; vessel_perfusion_rate*vessel_density*(1 - perfused_volume_fraction);
  antidote_secretion: perfused_volume_fraction + hypoxia_signal => antidote_blood; k_antidote_secretion*perfused_volume_fraction*hypoxia_signal;
  hypoxia_resolution: hypoxia_signal + perfused_volume_fraction => ; k_hypoxia_decay*hypoxia_signal*perfused_volume_fraction^2;

  // Unit definitions:
  unit mmol = 1e-3 mole;
  unit per_second = 1 / second;
  unit cm = 0.01 metre;
  unit cm2_per_second = (0.01 metre)^2 / second;
end
