// SBML level 3 version 2

model detox_gland_metabolism()
  // Synthetic Detox Gland — Antidote Biosynthesis
  // Metabolic model of the universal antidote biosynthesis pathway in engineered producer cells.
  // Toxin detection → NF-κB activation → Antidote fusion mRNA → Translation → Secretion

  // Compartments:
  compartment extracellular = 0.001 litre;
  compartment cytosol = 1e-12 litre;
  compartment nucleus = 2e-13 litre;
  compartment ER = 1e-13 litre;
  compartment blood = 5 litre;

  // Species:
  species toxin_Paraoxon in blood = 0;
  species toxin_LPS in blood = 0;
  species toxin_Hg in blood = 0;
  species toxin_BaP in blood = 0;
  species NFkB_inactive in cytosol = 100;
  species NFkB_active in nucleus = 1;
  species lkB in cytosol = 50;
  species IKK_active in cytosol = 10;
  species antidote_mRNA in nucleus = 0;
  species antidote_protein in ER = 0;
  species antidote_secreted in blood = 0;
  species $ATP in cytosol = 2000;
  species $amino_acids in cytosol = 500;

  // Parameters:
  Vmax_IKK = 0.5 per_second;
  Km_NFkB = 10 mmol;
  Vmax_transcription = 0.05 per_second;
  Vmax_translation = 0.01 per_second;
  Vmax_secretion = 0.002 per_second;
  degradation_mRNA = 0.0005 per_second;
  degradation_protein = 0.0001 per_second;
  k_toxin_sensor = 0.001 per_second;

  // Reactions:
  sensor_activation: toxin_Paraoxon => IKK_active; k_toxin_sensor*toxin_Paraoxon;
  NFkB_activation: NFkB_inactive => NFkB_active; Vmax_IKK*NFkB_inactive*(IKK_active/(Km_NFkB + IKK_active));
  transcription: NFkB_active + 100 $ATP => antidote_mRNA; Vmax_transcription*NFkB_active;
  translation: antidote_mRNA + 1887 $amino_acids + 18870 $ATP => antidote_protein; Vmax_translation*antidote_mRNA;
  secretion: antidote_protein => antidote_secreted; Vmax_secretion*antidote_protein;
  mRNA_degradation: antidote_mRNA => ; degradation_mRNA*antidote_mRNA;
  protein_degradation: antidote_protein => ; degradation_protein*antidote_protein;
  EPC_homing_SDF1: => antidote_mRNA; 0.001*exp(-0.0001*time);
  vessel_maturation: 10 $ATP => antidote_protein; 0.0005*antidote_mRNA;

  // Unit definitions:
  unit mmol = 1e-3 mole;
  unit per_second = 1 / second;
  unit mmol_per_second = 1e-3 mole / second;
end
