// SBML level 3 version 2

model homo_sapiens_gill_metabolism()
  // Human Gill Ion/Gas Exchange

  // Compartments:
  compartment water = 1e6; water is "ambient water";
  compartment ionocyte = 1e-12; ionocyte is "gill ionocyte";
  compartment blood = 1e-11; blood is "lamellar blood space";
  compartment cytoplasm = 8e-13; cytoplasm is "ionocyte cytoplasm";

  // Species:
  species CO2_w in water = 0.001; CO2_w is "CO2 water";
  species O2_w in water = 0.27; O2_w is "O2 dissolved";
  species CO2_b in blood = 0.05; CO2_b is "CO2 blood";
  species O2_b in blood = 0.01; O2_b is "O2 blood";
  species H2CO3 in cytoplasm = 0.001;
  species HCO3 in cytoplasm = 24;
  species Hp in cytoplasm = 4e-5;
  species Na_w in water = 0.1; Na_w is "Na+ water";
  species Na_ic in ionocyte = 12; Na_ic is "Na+ intracellular";
  species Na_b in blood = 145; Na_b is "Na+ blood";
  species K_ic in ionocyte = 140;
  species K_b in blood = 4.5;
  species ATP in ionocyte = 5;
  species ADP in ionocyte = 0.5;
  species Pi in ionocyte = 2;

  // Reactions:
  CA2_hydration: CO2_b -> HCO3 + Hp; 1.2e6*CO2_b; CA2_hydration is "CA2: CO2+H2O → H++HCO3-";
  NKA_pump: 3 Na_ic + 2 K_b + ATP => 3 Na_b + 2 K_ic + ADP + Pi; 500*Na_ic*ATP; NKA_pump is "Na/K-ATPase: 3Na out, 2K in";
  NHE3_exchange: Na_w + Hp => Na_ic; 200*Na_w; NHE3_exchange is "NHE3: Na+ uptake / H+ secretion";
  O2_diffusion: O2_w -> O2_b; 1.8e-3*(O2_w - O2_b); O2_diffusion is "O2 lamellar diffusion (counter-current)";
end
