// SBML level 3 version 2

model homo_sapiens_photosynthetic()
  // Human Photosynthetic Metabolism

  // Compartments:
  compartment stroma = 1e-14; stroma is "chloroplast stroma";
  compartment lumen = 1e-15; lumen is "thylakoid lumen";
  compartment cytoplasm = 1e-12; cytoplasm is "cell cytoplasm";
  compartment ambient = 1e6; ambient is "ambient (skin surface)";

  // Species:
  species CO2_a in ambient = 0.00041; CO2_a is "CO2 atmospheric";
  species CO2_s in stroma = 0.0002; CO2_s is "CO2 stroma";
  species H2O_s in stroma = 55.5; H2O_s is "H2O stroma";
  species O2_s in stroma = 0; O2_s is "O2 produced";
  species NADP in stroma = 0.5; NADP is "NADP+";
  species NADPH in stroma = 0;
  species ADP in stroma = 1;
  species ATP_s in stroma = 0.1; ATP_s is "ATP stroma";
  species Pi in stroma = 5;
  species RuBP in stroma = 0.2;
  species PGA in stroma = 0; PGA is "3-PGA";
  species G3P in stroma = 0;
  species Glc in cytoplasm = 0; Glc is "glucose";
  species Hp_l in lumen = 0.001; Hp_l is "H+ lumen";
  species Hp_s in stroma = 0.0001; Hp_s is "H+ stroma";
  species photon in ambient = 1; photon is "photon flux (normalised)";

  // Reactions:
  PSII_water_split: 2 H2O_s + 4 photon => 4 Hp_l + O2_s; 450*photon*H2O_s; PSII_water_split is "PSII: 2H2O + 4hν → 4H+(lumen) + 4e- + O2";
  PSI_NADPH: NADP + 4 photon => NADPH; 380*photon*NADP; PSI_NADPH is "PSI: 2Fd-red + NADP+ + H+ → 2Fd-ox + NADPH";
  CF1_ATP_synthesis: 3 Hp_l + ADP + Pi => ATP_s + 3 Hp_s; 200*Hp_l*ADP; CF1_ATP_synthesis is "CF0/CF1: 3H+(lumen)→stroma + ADP + Pi → ATP";
  RuBisCO_carboxylation: CO2_s + RuBP => 2 PGA; 3.3*RuBP*CO2_s/(CO2_s + 0.00008); RuBisCO_carboxylation is "RuBisCO: CO2 + RuBP → 2×3-PGA";
  PGA_reduction: 2 PGA + 2 ATP_s + 2 NADPH => 2 G3P + 2 ADP + 2 NADP; 100*PGA*NADPH; PGA_reduction is "3-PGA + ATP + NADPH → G3P + ADP + NADP+";
  RuBP_regeneration: 5 G3P + 3 ATP_s => 3 RuBP + 3 ADP; 50*G3P*ATP_s; RuBP_regeneration is "5G3P + 3ATP → 3RuBP";
  G3P_export: 2 G3P => Glc; 30*G3P; G3P_export is "G3P stroma → G3P cytoplasm → glucose (net)";
  CO2_diffusion: CO2_a -> CO2_s; 5e-4*(CO2_a - CO2_s); CO2_diffusion is "CO2 atmospheric → stroma (cutaneous diffusion)";
end
