// SBML level 3 version 2

model homo_arboreus_metabolism()
  // Treople (Homo arboreus) Metabolism

  // Compartments:
  compartment stroma = 1e-14; stroma is "chloroplast stroma";
  compartment lumen = 1e-15; lumen is "thylakoid lumen";
  compartment cytoplasm = 1e-12; cytoplasm is "cell cytoplasm";
  compartment apoplast = 1e-13; apoplast is "cell wall apoplast";
  compartment periarbuscular = 1e-13; periarbuscular is "mycorrhizal interface";
  compartment soil = 1e6; soil is "soil (fungal domain)";
  compartment ambient = 1e6; ambient is "ambient air";

  // Species:
  species CO2_a in ambient = 0.00041;
  species CO2_s in stroma = 0.0002;
  species O2_s in stroma = 0;
  species NADPH in stroma = 0;
  species NADP in stroma = 0.5;
  species ATP_s in stroma = 0.1;
  species ADP in stroma = 1;
  species RuBP in stroma = 0.2;
  species G3P in stroma = 0;
  species photon in ambient = 1;
  species UDPGlc in cytoplasm = 1; UDPGlc is "UDP-glucose";
  species UDP in cytoplasm = 0.1;
  species cellulose in apoplast = 0; cellulose is "beta-1,4-glucan (cellulose)";
  species Phe in cytoplasm = 0.3; Phe is "phenylalanine";
  species cinnamate in cytoplasm = 0;
  species monolignol in apoplast = 0;
  species lignin in apoplast = 0;
  species Glc_export in periarbuscular = 0; Glc_export is "glucose exported to fungus";
  species Pi_import in periarbuscular = 0; Pi_import is "phosphate from soil fungus";
  species Pi_soil in soil = 5;

  // Reactions:
  PSII_fullcanopy: 3 CO2_s + 6 NADP + 9 ADP + 3 RuBP + 18 photon => 6 G3P + 6 NADPH + 9 ATP_s + 3 O2_s; 850*photon*CO2_s; PSII_fullcanopy is "PSII + PSI + Calvin: canopy-scale O2 + G3P production";
  CesA_cellulose: UDPGlc => cellulose + UDP; 14*UDPGlc/(UDPGlc + 0.8); CesA_cellulose is "CesA rosette: UDP-Glc → beta-1,4-glucan (cellulose)";
  lignin_biosynthesis: Phe => monolignol; 2.5*Phe; lignin_biosynthesis is "Phe → monolignol (PAL/C4H/4CL/CCR/CAD)";
  LAC17_lignin: monolignol => lignin; 8*monolignol; LAC17_lignin is "LAC17: monolignol → lignin polymer (Cu-oxidase)";
  mycorrhizal_C_export: 2 G3P => Glc_export; 15*G3P; mycorrhizal_C_export is "PT4 / RAM1: glucose to mycorrhizal fungus";
  mycorrhizal_Pi_import: Pi_soil => Pi_import; 120*Pi_soil/(Pi_soil + 0.5); mycorrhizal_Pi_import is "PT4: Pi from soil fungus → periarbuscular → cytoplasm";
  stomatal_CO2: CO2_a -> CO2_s; 0.08*(CO2_a - CO2_s); stomatal_CO2 is "Stomata: CO2 air → stroma (direct; bypasses pulmonary route)";
end
